*Heading
** Job name: Shell-AllLoads Model name: Model-1-ShellOnly
** Generated by: Abaqus/CAE 2023
*Preprint, echo=NO, model=NO, history=NO, contact=NO
**
** PARTS
**
*Part, name=Part-Shellonly
*End Part
**
**
** ASSEMBLY
**
*Assembly, name=Assembly
**
*Instance, name=Part-Shellonly-1, part=Part-Shellonly
*Node
      1,  -4.44000006,   1.94000006,          70.
      2,  -4.44000006,  -1.94000006,          70.
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*Element, type=S4R
   1,    1,    9,  661,  300
   2,    9,   10,  662,  661
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*Nset, nset=Set-1, generate
    1,  7332,     1
*Elset, elset=Set-1, generate
    1,  7280,     1
** Section: Section-Shell
*Shell Section, elset=Set-1, material=Material-Al
0.12, 5
*End Instance
**
*Nset, nset=Set-1, instance=Part-Shellonly-1
   3,   4,   6,   8, 155, 156
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*Elset, elset=Set-1, instance=Part-Shellonly-1
 1113, 1114, 1115, 1116, 1117, 1118
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*Elset, elset=_Surf-1_SNEG, internal, instance=Part-Shellonly-1, generate
 4761,  7280,     1
*Surface, type=ELEMENT, name=Surf-1
_Surf-1_SNEG, SNEG
*Elset, elset=_Surf-2_SPOS, internal, instance=Part-Shellonly-1, generate
 1121,  3640,     1
*Surface, type=ELEMENT, name=Surf-2
_Surf-2_SPOS, SPOS
*Elset, elset=_Surf-3_SNEG, internal, instance=Part-Shellonly-1, generate
 1121,  3640,     1
*Surface, type=ELEMENT, name=Surf-3
_Surf-3_SNEG, SNEG
*End Assembly
**
** MATERIALS
**
*Material, name=Material-Al
*Density
2710.,
*Elastic
 7e+10, 0.3
** ----------------------------------------------------------------
**
** STEP: Step-1
**
*Step, name=Step-1, nlgeom=YES
*Static
1., 1., 1e-05, 1.
**
** BOUNDARY CONDITIONS
**
** Name: BC-Base Type: Symmetry/Antisymmetry/Encastre
*Boundary
Set-1, ENCASTRE
**
** LOADS
**
** Name: Load-1   Type: Pressure
*Dsload
Surf-1, P, -79.3651
** Name: Load-2   Type: Pressure
*Dsload
Surf-3, P, 79.3651
** Name: Load-3   Type: Gravity
*Dload
, GRAV, 1., 0., 0., 1.
** Name: Load-4   Type: Rotational body force
*Dload
Part-Shellonly-1.Set-1, CENTRIF, 7.84,0.,0.,0.,0.,1.,0.
**
** OUTPUT REQUESTS
**
*Restart, write, frequency=0
**
** FIELD OUTPUT: F-Output-1
**
*Output, field, variable=PRESELECT
**
** HISTORY OUTPUT: H-Output-1
**
*Output, history, variable=PRESELECT
*End Step
