*Heading
** Job name: ShellnSolid-AllLoads Model name: Model-1-ShellnSolid
** Generated by: Abaqus/CAE 2023
*Preprint, echo=NO, model=NO, history=NO, contact=NO
**
** PARTS
**
*Part, name=Part-Shell
*End Part
**
*Part, name=Part-Solid
*End Part
**
**
** ASSEMBLY
**
*Assembly, name=Assembly
**
*Instance, name=Part-Shell-1, part=Part-Shell
*Node
      1,  -4.44000006,   1.94000006,          50.
      2,  -4.44000006,  -1.94000006,          50.
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*Element, type=S4R
  1,    1,    9,  501,  220
  2,    9,   10,  502,  501
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*Nset, nset=Set-Shell, generate
    1,  5252,     1
*Elset, elset=Set-Shell, generate
    1,  5200,     1
** Section: Section-Shell
*Shell Section, elset=Set-Shell, material=Material-Al
0.12, 5
*End Instance
**
*Instance, name=Part-Solid-1, part=Part-Solid
          0.,           0.,          50.
*Node
      1,   4.38000011,         1.88,           0.
      2,  -4.38000011,         1.88,           0.
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*Element, type=C3D8R
   1,    7,   74,   26,    2,  111,  178,  130,  106
   2,   74,   75,   27,   26,  178,  179,  131,  130
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*Nset, nset=Set-Solid, generate
    1,  4264,     1
*Elset, elset=Set-Solid, generate
    1,  2080,     1
** Section: Section-Solid
*Solid Section, elset=Set-Solid, material=Material-Al
,
*End Instance
**
*Nset, nset=Set-All, instance=Part-Shell-1, generate
    1,  5252,     1
*Nset, nset=Set-All, instance=Part-Solid-1, generate
    1,  4264,     1
*Elset, elset=Set-All, instance=Part-Shell-1, generate
    1,  5200,     1
*Elset, elset=Set-All, instance=Part-Solid-1, generate
    1,  2080,     1
*Nset, nset=Set-Base, instance=Part-Shell-1
   3,   4,   6,   8, 115, 116
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*Elset, elset=Set-Base, instance=Part-Shell-1
  793,  794,  795,  796,  797,  798
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*Elset, elset=_Surf-Bot_SNEG, internal, instance=Part-Shell-1, generate
  801,  2600,     1
*Elset, elset=_Surf-Bot_S3, internal, instance=Part-Solid-1
    3,   28,   29,   30,   31,   32
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*Elset, elset=_Surf-Bot_S6, internal, instance=Part-Solid-1
   35,   36,   37,   38,   39,   40
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*Elset, elset=_Surf-Bot_S5, internal, instance=Part-Solid-1, generate
   50,  2078,    52
*Surface, type=ELEMENT, name=Surf-Bot
_Surf-Bot_SNEG, SNEG
_Surf-Bot_S3, S3
_Surf-Bot_S6, S6
_Surf-Bot_S5, S5
*Elset, elset=_Surf-Top_SNEG, internal, instance=Part-Shell-1, generate
 3401,  5200,     1
*Elset, elset=_Surf-Top_S3, internal, instance=Part-Solid-1
    4,    6,    7,    8,    9,   10
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*Elset, elset=_Surf-Top_S6, internal, instance=Part-Solid-1
   13,   14,   15,   16,   17,   18
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*Elset, elset=_Surf-Top_S5, internal, instance=Part-Solid-1, generate
   52,  2080,    52
*Surface, type=ELEMENT, name=Surf-Top
_Surf-Top_SNEG, SNEG
_Surf-Top_S3, S3
_Surf-Top_S6, S6
_Surf-Top_S5, S5
*Elset, elset=_m_Surf-Shell_E1, internal, instance=Part-Shell-1
    1,    2,    3,    4,    5,    6
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*Surface, type=ELEMENT, name=m_Surf-Shell
_m_Surf-Shell_E1, E1
*Elset, elset=_s_Surf-solid_S1, internal, instance=Part-Solid-1, generate
  1,  52,   1
*Surface, type=ELEMENT, name=s_Surf-solid
_s_Surf-solid_S1, S1
** Constraint: Constraint-Shell2Solid
*Shell to Solid Coupling, constraint name=Constraint-Shell2Solid
m_Surf-Shell, s_Surf-solid
*End Assembly
**
** MATERIALS
**
*Material, name=Material-Al
*Density
2710.,
*Elastic
 7e+10, 0.3
** ----------------------------------------------------------------
**
** STEP: Step-1
**
*Step, name=Step-1, nlgeom=YES
*Static
1., 1., 1e-05, 1.
**
** BOUNDARY CONDITIONS
**
** Name: BC-base Type: Symmetry/Antisymmetry/Encastre
*Boundary
Set-Base, ENCASTRE
**
** LOADS
**
** Name: Load-1   Type: Pressure
*Dsload
Surf-Top, P, -79.3651
** Name: Load-2   Type: Pressure
*Dsload
Surf-Bot, P, 79.3651
** Name: Load-3   Type: Gravity
*Dload
, GRAV, 1., 0., 0., 1.
** Name: Load-4   Type: Rotational body force
*Dload
Set-All, CENTRIF, 7.84,0.,0.,0.,0.,1.,0.
**
** OUTPUT REQUESTS
**
*Restart, write, frequency=0
**
** FIELD OUTPUT: F-Output-1
**
*Output, field, variable=PRESELECT
**
** HISTORY OUTPUT: H-Output-1
**
*Output, history, variable=PRESELECT
*End Step
