*Heading
** Job name: Solid-AllLoads Model name: Model-1-SolidAllloads
** Generated by: Abaqus/CAE 2023
*Preprint, echo=NO, model=NO, history=NO, contact=NO
**
** PARTS
**
*Part, name=Spar-3D-Pressure
*End Part
**
**
** ASSEMBLY
**
*Assembly, name=Assembly
**
*Instance, name=Spar-3D-Pressure-1, part=Spar-3D-Pressure
*Node
      1,   4.38000011,         1.88,           0.
      2,  -4.38000011,         1.88,           0.
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*Element, type=C3D8R
   1,     6,    98,    26,     2,   110,   202,   130,   106
   2,    98,    99,    27,    26,   202,   203,   131,   130
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*Nset, nset=Set-1, generate
     1,  14664,      1
*Elset, elset=Set-1, generate
    1,  7280,     1
** Section: Section-1
*Solid Section, elset=Set-1, material=Material-Al
,
*End Instance
**
*Nset, nset=Base, instance=Spar-3D-Pressure-1, generate
   1,  104,    1
*Elset, elset=Base, instance=Spar-3D-Pressure-1, generate
  1,  52,   1
*Elset, elset=_Pressure_S3, internal, instance=Spar-3D-Pressure-1
    3,   28,   29,   30,   31,   32
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*Elset, elset=_Pressure_S6, internal, instance=Spar-3D-Pressure-1
   35,   36,   37,   38,   39,   40
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*Elset, elset=_Pressure_S5, internal, instance=Spar-3D-Pressure-1, generate
   50,  7278,    52
*Surface, type=ELEMENT, name=Pressure
_Pressure_S3, S3
_Pressure_S6, S6
_Pressure_S5, S5
*Elset, elset=_Suction_S3, internal, instance=Spar-3D-Pressure-1
    4,    6,    7,    8,    9,   10
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*Elset, elset=_Suction_S6, internal, instance=Spar-3D-Pressure-1
   13,   14,   15,   16,   17,   18
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*Elset, elset=_Suction_S5, internal, instance=Spar-3D-Pressure-1, generate
   52,  7280,    52
*Surface, type=ELEMENT, name=Suction
_Suction_S3, S3
_Suction_S6, S6
_Suction_S5, S5
*End Assembly
**
** MATERIALS
**
*Material, name=Material-Al
*Density
2710.,
*Elastic
 7e+10, 0.3
**
** BOUNDARY CONDITIONS
**
** Name: BC-base Type: Symmetry/Antisymmetry/Encastre
*Boundary
Base, ENCASTRE
** ----------------------------------------------------------------
**
** STEP: Step-1
**
*Step, name=Step-1, nlgeom=YES
*Static
1., 1., 1e-05, 1.
**
** LOADS
**
** Name: Grav   Type: Gravity
*Dload
, GRAV, 1., 0., 0., 1.
** Name: Load-PressurePressure1   Type: Pressure
*Dsload
Pressure, P, 79.3651
** Name: Load-PressureSuction1   Type: Pressure
*Dsload
Suction, P, -79.3651
** Name: Rotational   Type: Rotational body force
*Dload
Spar-3D-Pressure-1.Set-1, CENTRIF, 7.84,0.,0.,0.,0.,1.,0.
**
** OUTPUT REQUESTS
**
*Restart, write, frequency=0
**
** FIELD OUTPUT: F-Output-1
**
*Output, field, variable=PRESELECT
**
** HISTORY OUTPUT: H-Output-1
**
*Output, history, variable=PRESELECT
*End Step
