*Heading
** Job name: Submodelling Model name: Submodelling
** Generated by: Abaqus/CAE 2023
*Preprint, echo=NO, model=NO, history=NO, contact=NO
**
** PARTS
**
*Part, name=Shell
*End Part
**
**
** ASSEMBLY
**
*Assembly, name=Assembly
**
*Instance, name=Shell-1, part=Shell
*Node
      1,   4.44000006,   1.94000006,          50.
      2,  -4.44000006,   1.94000006,          50.
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*Element, type=S4R
   1,    1,   13,  709,  244
   2,   13,   14,  710,  709
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*Nset, nset=Set-1, generate
    1,  7332,     1
*Elset, elset=Set-1, generate
    1,  7280,     1
** Section: Section-1
*Shell Section, elset=Set-1, material=Material-Al
0.12, 5
*End Instance
**
*Nset, nset=Set-1, instance=Shell-1
   3,   4,  10,  12, 129, 130
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*Elset, elset=Set-1, instance=Shell-1
 1783, 1784, 1785, 1786, 1787, 1788
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*Elset, elset=_Surf-Bot_SNEG, internal, instance=Shell-1
 2121, 2122, 2123, 2124, 2125, 2126
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*Surface, type=ELEMENT, name=Surf-Bot
_Surf-Bot_SNEG, SNEG
*Elset, elset=_Surf-Top_SNEG, internal, instance=Shell-1
    1,    2,    3,    4,    5,    6
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*Surface, type=ELEMENT, name=Surf-Top
_Surf-Top_SNEG, SNEG
*End Assembly
**
** MATERIALS
**
*Material, name=Material-Al
*Density
2710.,
*Elastic
 7e+10, 0.3
** ----------------------------------------------------------------
**
** STEP: Step-1
**
*Step, name=Step-1, nlgeom=YES
*Static
1., 1., 1e-05, 1.
**
** BOUNDARY CONDITIONS
**
** Name: BC-Base Type: Symmetry/Antisymmetry/Encastre
*Boundary
Set-1, ENCASTRE
**
** LOADS
**
** Name: Load-1   Type: Pressure
*Dsload
Surf-Top, P, -79.365
** Name: Load-2   Type: Pressure
*Dsload
Surf-Bot, P, 79.365
** Name: Load-3   Type: Gravity
*Dload
, GRAV, 1., 0., 0., 1.
** Name: Load-4   Type: Rotational body force
*Dload
Shell-1.Set-1, CENTRIF, 7.84,0.,0.,0.,0.,1.,0.
**
** OUTPUT REQUESTS
**
*Restart, write, frequency=0
**
** FIELD OUTPUT: F-Output-1
**
*Output, field, variable=PRESELECT
**
** HISTORY OUTPUT: H-Output-1
**
*Output, history, variable=PRESELECT
*End Step
