*Heading
** Job name: SubmodellingSolid Model name: SubmodellingSolidTip
** Generated by: Abaqus/CAE 2023
*Preprint, echo=NO, model=NO, history=NO, contact=NO
**
** PARTS
**
*Part, name="Solid Tip"
*End Part
**
**
** ASSEMBLY
**
*Assembly, name=Assembly
**
*Instance, name="Solid Tip-1", part="Solid Tip"
          0.,           0.,          50.
*Node
      1,  -4.44000006,  -1.94000006,           0.
      2,  -4.44000006,   1.94000006,           0.
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*Element, type=C3D8R
   1,    27,    26,    70,    69,   287,   286,   330,   329
   2,   116,    28,     2,     5,   376,   288,   262,   265
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*Nset, nset=Set-1, generate
     1,  10660,      1
*Elset, elset=Set-1, generate
    1,  8320,     1
** Section: Section-1
*Solid Section, elset=Set-1, material=Material-Al
,
*End Instance
**
*Nset, nset=Set-1, instance="Solid Tip-1", generate
   1,  260,    1
*Elset, elset=Set-1, instance="Solid Tip-1", generate
   1,  208,    1
*Submodel, type=NODE, shell to solid, shell thickness=0.12, exteriorTolerance=0.05
Set-1,
*End Assembly
**
** MATERIALS
**
*Material, name=Material-Al
*Density
2710.,
*Elastic
 7e+10, 0.3
** ----------------------------------------------------------------
**
** STEP: Step-1
**
*Step, name=Step-1, nlgeom=YES
*Static
1., 1., 1e-05, 1.
**
** BOUNDARY CONDITIONS
**
** Name: BC-1 Type: Submodel
*Boundary, submodel, step=1
Set-1, 0.1
**
** OUTPUT REQUESTS
**
*Restart, write, frequency=0
**
** FIELD OUTPUT: F-Output-1
**
*Output, field, variable=PRESELECT
**
** HISTORY OUTPUT: H-Output-1
**
*Output, history, variable=PRESELECT
*End Step
